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/batch
! ANSYS input file written by Workbench version 2026 R1
! File used for geometry attach: F:\CoME\Forth Semester\Practice FEM\Git_upload\03_Axisymmetric_FEM_Analysis\1_water_foundain\ansys\project_files\water_fountain_files\dp0\Geom\DM\Geom.agdb
/title,water_fountain--Static Structural (B5)
/com,--- Data in consistent NMM units. See Solving Units in the help system for more information.
/units,MPA
/prep7
! Turn off shape checking because checks already performed inside WB mesher.
! See help system for more information.
SHPP,OFF,,NOWARN
etcon,set             ! allow ANSYS to choose best KEYOP's for 180x elements, resets any applicable keyopt to MAPDL defaults
/com,*********** Send User Defined Coordinate System(s) ***********
local,12,0,680.,760.,0.,-90.,0.,-180.
local,13,0,940.,180.,0.,-90.,0.,-180.
csys,0
/com,*********** Nodes for the whole assembly ***********
nblock,3,,11357
(1i9,3e20.9e3)
        1     6.278880793E+02     5.895164727E+02     0.000000000E+00
        2     6.289820117E+02     5.869687400E+02     0.000000000E+00
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-1
/com,*********** Elements for Body 1 'Surface Body' ***********
et,1,183
keyo,1,3,1
MAT,1 $ TYPE,1 $ REAL,1 $ SECNUM,1 $ ESYS,0    ! ELEMNODES = 8
eblock,21,COMPACT,,3372
(21i9)
        1     2914      240      239      239     3478     4030      239     4244
        2     2914     3020      240      240     9321     3535      240     3478
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-1
secnum,1    ! reset the section ID to default
toffst,273.15,      ! Temperature offset from absolute zero
/com,*********** Set Reference Temperature ***********
tref,22.
/com,*********** Send Materials ***********
Temperature = 'TEMP' ! Temperature
MP,DENS,1,2.3e-09,	! tonne mm^-3
MP,ALPX,1,1.4e-05,	! C^-1
MP,C,1,780000000,	! mm^2 s^-2 C^-1
MP,KXX,1,0.72,	! tonne mm s^-3 C^-1
MP,EX,1,30000,	! tonne s^-2 mm^-1
MP,NUXY,1,0.18,

!************************* Model Summary ********************
! Surface Body,	Concrete,	matid,	1
!************************* End Model Summary ********************
/com,*********** Fixed Supports ***********
CMBLOCK,_FIXEDSU,NODE,       40
(8i10)
      2756      2768      2771      2773      2808      2815      2822      2824
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cmsel,s,_FIXEDSU
d,all,all
nsel,all
/com,********* Frictionless Supports X *********
CMBLOCK,_FRICSUX,NODE,       44
(8i10)
      2715      2718     -2720      2723      2746      2750      2752      2753
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cmsel,s,_FRICSUX
d,all,ux,0
nsel,all
/com,*********** Create Hydrostatic Pressure ***********
et,2,153
keyop,2,3,10        ! get plane stress option and thickness from underlying element
MAT,2 $ TYPE,2 $ REAL,2 $ SECNUM,2 $ ESYS,0    ! ELEMNODES = 3
eblock,21,COMPACT,,100
(21i9)
     3373     3071     2953     9379
     3374     2911     3071     9378
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-1
secnum,1    ! reset the section ID to default
esel,s,type,,2
esel,all
!
! ANSYS Function Representation
!
*DIM,_loadvari37,TABLE,6,9,3,,,,12
!
! Begin of equation: x (MPa)
_loadvari37(0,0,1)= -50, -999
_loadvari37(2,0,1)= 0.0
_loadvari37(3,0,1)= 0.0
_loadvari37(4,0,1)= 0.0
_loadvari37(5,0,1)= 0.0
_loadvari37(6,0,1)= 0.0
_loadvari37(0,1,1)= 1.0, -1, 0, 0.0010000000000000000208, 0, 0, 2
_loadvari37(0,2,1)= 0.0, -2, 0, 1, 2, 3, -1
_loadvari37(0,3,1)=   1, -1, 0, 0.000001, 0, 0, -2
_loadvari37(0,4,1)= 0.0, -3, 0, 1, -2, 3, -1
_loadvari37(0,5,1)= 0.0, 99, 0, 1, -3, 0, 0
_loadvari37(0,6,1)= 0.0,
_loadvari37(0,7,1)= 0.0,
_loadvari37(0,8,1)= 0.0,
_loadvari37(0,9,1)= 0.0,
! End of equation: x (MPa)
!
! Begin of equation: 9800.*(-x) (MPa)
_loadvari37(0,0,2)= 0, -999
_loadvari37(2,0,2)= 0.0
_loadvari37(3,0,2)= 0.0
_loadvari37(4,0,2)= 0.0
_loadvari37(5,0,2)= 0.0
_loadvari37(6,0,2)= 0.0
_loadvari37(0,1,2)= 1.0, -1, 0, 0.0010000000000000000208, 0, 0, 2
_loadvari37(0,2,2)= 0.0, -2, 0, 1, 2, 3, -1
_loadvari37(0,3,2)=   1, -1, 0, -1, 0, 0, -2
_loadvari37(0,4,2)= 0.0, -3, 0, 1, -1, 3, -2
_loadvari37(0,5,2)= 0.0, -1, 0, 9800, 0, 0, -3
_loadvari37(0,6,2)= 0.0, -2, 0, 1, -1, 3, -3
_loadvari37(0,7,2)= 0.0, -1, 0, 0.000001, 0, 0, -2
_loadvari37(0,8,2)= 0.0, -3, 0, 1, -2, 3, -1
_loadvari37(0,9,2)= 0.0, 99, 0, 1, -3, 0, 0
! End of equation: 9800.*(-x) (MPa)
!
! Begin of equation: 0.0 (MPa)
_loadvari37(0,0,3)= 50, -999
_loadvari37(2,0,3)= 0.0
_loadvari37(3,0,3)= 0.0
_loadvari37(4,0,3)= 0.0
_loadvari37(5,0,3)= 0.0
_loadvari37(6,0,3)= 0.0
_loadvari37(0,1,3)= 1.0, -1, 0, 0, 0, 0, 0
_loadvari37(0,2,3)= 0.0, -2, 0, 0.000001, 0, 0, -1
_loadvari37(0,3,3)=   1, -3, 0, 1, -1, 3, -2
_loadvari37(0,4,3)= 0.0, 99, 0, 1, -3, 0, 0
_loadvari37(0,5,3)= 0.0,
_loadvari37(0,6,3)= 0.0,
_loadvari37(0,7,3)= 0.0,
_loadvari37(0,8,3)= 0.0,
_loadvari37(0,9,3)= 0.0,
! End of equation: 0.0 (MPa)

!
! ANSYS Function Representation
!
*DIM,_loadvari37r,TABLE,6,12,3,,,,12
!
! Begin of equation: x (MPa)
_loadvari37r(0,0,1)= -50, -999
_loadvari37r(2,0,1)= 0.0
_loadvari37r(3,0,1)= 0.0
_loadvari37r(4,0,1)= 0.0
_loadvari37r(5,0,1)= 0.0
_loadvari37r(6,0,1)= 0.0
_loadvari37r(0,1,1)= 1.0, -1, 0, 0.0010000000000000000208, 0, 0, 2
_loadvari37r(0,2,1)= 0.0, -2, 0, 1, 2, 3, -1
_loadvari37r(0,3,1)=   1, -1, 0, 0.000001, 0, 0, -2
_loadvari37r(0,4,1)= 0.0, -3, 0, 1, -2, 3, -1
_loadvari37r(0,5,1)= 0.0, 99, 0, 1, -3, 0, 0
_loadvari37r(0,6,1)= 0.0,
_loadvari37r(0,7,1)= 0.0,
_loadvari37r(0,8,1)= 0.0,
_loadvari37r(0,9,1)= 0.0,
_loadvari37r(0,10,1)= 0.0,
_loadvari37r(0,11,1)= 0.0,
_loadvari37r(0,12,1)= 0.0,
! End of equation: x (MPa)
!
! Begin of equation: 9800.*(-x)*time/1 (MPa)
_loadvari37r(0,0,2)= 0, -999
_loadvari37r(2,0,2)= 0.0
_loadvari37r(3,0,2)= 0.0
_loadvari37r(4,0,2)= 0.0
_loadvari37r(5,0,2)= 0.0
_loadvari37r(6,0,2)= 0.0
_loadvari37r(0,1,2)= 1.0, -1, 0, 0.0010000000000000000208, 0, 0, 2
_loadvari37r(0,2,2)= 0.0, -2, 0, 1, 2, 3, -1
_loadvari37r(0,3,2)=   1, -1, 0, -1, 0, 0, -2
_loadvari37r(0,4,2)= 0.0, -3, 0, 1, -1, 3, -2
_loadvari37r(0,5,2)= 0.0, -1, 0, 9800, 0, 0, -3
_loadvari37r(0,6,2)= 0.0, -2, 0, 1, -1, 3, -3
_loadvari37r(0,7,2)= 0.0, -1, 0, 1, -2, 3, 1
_loadvari37r(0,8,2)= 0.0, -2, 0, 1, 0, 0, -1
_loadvari37r(0,9,2)= 0.0, -3, 0, 1, -1, 4, -2
_loadvari37r(0,10,2)= 0.0, -1, 0, 0.000001, 0, 0, -3
_loadvari37r(0,11,2)= 0.0, -2, 0, 1, -3, 3, -1
_loadvari37r(0,12,2)= 0.0, 99, 0, 1, -2, 0, 0
! End of equation: 9800.*(-x)*time/1 (MPa)
!
! Begin of equation: 0.0 (MPa)
_loadvari37r(0,0,3)= 50, -999
_loadvari37r(2,0,3)= 0.0
_loadvari37r(3,0,3)= 0.0
_loadvari37r(4,0,3)= 0.0
_loadvari37r(5,0,3)= 0.0
_loadvari37r(6,0,3)= 0.0
_loadvari37r(0,1,3)= 1.0, -1, 0, 0, 0, 0, 0
_loadvari37r(0,2,3)= 0.0, -2, 0, 0.000001, 0, 0, -1
_loadvari37r(0,3,3)=   1, -3, 0, 1, -1, 3, -2
_loadvari37r(0,4,3)= 0.0, 99, 0, 1, -3, 0, 0
_loadvari37r(0,5,3)= 0.0,
_loadvari37r(0,6,3)= 0.0,
_loadvari37r(0,7,3)= 0.0,
_loadvari37r(0,8,3)= 0.0,
_loadvari37r(0,9,3)= 0.0,
_loadvari37r(0,10,3)= 0.0,
_loadvari37r(0,11,3)= 0.0,
_loadvari37r(0,12,3)= 0.0,
! End of equation: 0.0 (MPa)

/com,*********** Create Hydrostatic Pressure ***********
et,3,153
keyop,3,3,10        ! get plane stress option and thickness from underlying element
MAT,3 $ TYPE,3 $ REAL,3 $ SECNUM,3 $ ESYS,0    ! ELEMNODES = 3
eblock,21,COMPACT,,38
(21i9)
     3473     3003     2938     9356
     3474     2763     3003     9357
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-1
secnum,1    ! reset the section ID to default
esel,s,type,,3
esel,all
!
! ANSYS Function Representation
!
*DIM,_loadvari42,TABLE,6,9,3,,,,13
!
! Begin of equation: x (MPa)
_loadvari42(0,0,1)= -50, -999
_loadvari42(2,0,1)= 0.0
_loadvari42(3,0,1)= 0.0
_loadvari42(4,0,1)= 0.0
_loadvari42(5,0,1)= 0.0
_loadvari42(6,0,1)= 0.0
_loadvari42(0,1,1)= 1.0, -1, 0, 0.0010000000000000000208, 0, 0, 2
_loadvari42(0,2,1)= 0.0, -2, 0, 1, 2, 3, -1
_loadvari42(0,3,1)=   1, -1, 0, 0.000001, 0, 0, -2
_loadvari42(0,4,1)= 0.0, -3, 0, 1, -2, 3, -1
_loadvari42(0,5,1)= 0.0, 99, 0, 1, -3, 0, 0
_loadvari42(0,6,1)= 0.0,
_loadvari42(0,7,1)= 0.0,
_loadvari42(0,8,1)= 0.0,
_loadvari42(0,9,1)= 0.0,
! End of equation: x (MPa)
!
! Begin of equation: 9800.*(-x) (MPa)
_loadvari42(0,0,2)= 0, -999
_loadvari42(2,0,2)= 0.0
_loadvari42(3,0,2)= 0.0
_loadvari42(4,0,2)= 0.0
_loadvari42(5,0,2)= 0.0
_loadvari42(6,0,2)= 0.0
_loadvari42(0,1,2)= 1.0, -1, 0, 0.0010000000000000000208, 0, 0, 2
_loadvari42(0,2,2)= 0.0, -2, 0, 1, 2, 3, -1
_loadvari42(0,3,2)=   1, -1, 0, -1, 0, 0, -2
_loadvari42(0,4,2)= 0.0, -3, 0, 1, -1, 3, -2
_loadvari42(0,5,2)= 0.0, -1, 0, 9800, 0, 0, -3
_loadvari42(0,6,2)= 0.0, -2, 0, 1, -1, 3, -3
_loadvari42(0,7,2)= 0.0, -1, 0, 0.000001, 0, 0, -2
_loadvari42(0,8,2)= 0.0, -3, 0, 1, -2, 3, -1
_loadvari42(0,9,2)= 0.0, 99, 0, 1, -3, 0, 0
! End of equation: 9800.*(-x) (MPa)
!
! Begin of equation: 0.0 (MPa)
_loadvari42(0,0,3)= 50, -999
_loadvari42(2,0,3)= 0.0
_loadvari42(3,0,3)= 0.0
_loadvari42(4,0,3)= 0.0
_loadvari42(5,0,3)= 0.0
_loadvari42(6,0,3)= 0.0
_loadvari42(0,1,3)= 1.0, -1, 0, 0, 0, 0, 0
_loadvari42(0,2,3)= 0.0, -2, 0, 0.000001, 0, 0, -1
_loadvari42(0,3,3)=   1, -3, 0, 1, -1, 3, -2
_loadvari42(0,4,3)= 0.0, 99, 0, 1, -3, 0, 0
_loadvari42(0,5,3)= 0.0,
_loadvari42(0,6,3)= 0.0,
_loadvari42(0,7,3)= 0.0,
_loadvari42(0,8,3)= 0.0,
_loadvari42(0,9,3)= 0.0,
! End of equation: 0.0 (MPa)

!
! ANSYS Function Representation
!
*DIM,_loadvari42r,TABLE,6,12,3,,,,13
!
! Begin of equation: x (MPa)
_loadvari42r(0,0,1)= -50, -999
_loadvari42r(2,0,1)= 0.0
_loadvari42r(3,0,1)= 0.0
_loadvari42r(4,0,1)= 0.0
_loadvari42r(5,0,1)= 0.0
_loadvari42r(6,0,1)= 0.0
_loadvari42r(0,1,1)= 1.0, -1, 0, 0.0010000000000000000208, 0, 0, 2
_loadvari42r(0,2,1)= 0.0, -2, 0, 1, 2, 3, -1
_loadvari42r(0,3,1)=   1, -1, 0, 0.000001, 0, 0, -2
_loadvari42r(0,4,1)= 0.0, -3, 0, 1, -2, 3, -1
_loadvari42r(0,5,1)= 0.0, 99, 0, 1, -3, 0, 0
_loadvari42r(0,6,1)= 0.0,
_loadvari42r(0,7,1)= 0.0,
_loadvari42r(0,8,1)= 0.0,
_loadvari42r(0,9,1)= 0.0,
_loadvari42r(0,10,1)= 0.0,
_loadvari42r(0,11,1)= 0.0,
_loadvari42r(0,12,1)= 0.0,
! End of equation: x (MPa)
!
! Begin of equation: 9800.*(-x)*time/1 (MPa)
_loadvari42r(0,0,2)= 0, -999
_loadvari42r(2,0,2)= 0.0
_loadvari42r(3,0,2)= 0.0
_loadvari42r(4,0,2)= 0.0
_loadvari42r(5,0,2)= 0.0
_loadvari42r(6,0,2)= 0.0
_loadvari42r(0,1,2)= 1.0, -1, 0, 0.0010000000000000000208, 0, 0, 2
_loadvari42r(0,2,2)= 0.0, -2, 0, 1, 2, 3, -1
_loadvari42r(0,3,2)=   1, -1, 0, -1, 0, 0, -2
_loadvari42r(0,4,2)= 0.0, -3, 0, 1, -1, 3, -2
_loadvari42r(0,5,2)= 0.0, -1, 0, 9800, 0, 0, -3
_loadvari42r(0,6,2)= 0.0, -2, 0, 1, -1, 3, -3
_loadvari42r(0,7,2)= 0.0, -1, 0, 1, -2, 3, 1
_loadvari42r(0,8,2)= 0.0, -2, 0, 1, 0, 0, -1
_loadvari42r(0,9,2)= 0.0, -3, 0, 1, -1, 4, -2
_loadvari42r(0,10,2)= 0.0, -1, 0, 0.000001, 0, 0, -3
_loadvari42r(0,11,2)= 0.0, -2, 0, 1, -3, 3, -1
_loadvari42r(0,12,2)= 0.0, 99, 0, 1, -2, 0, 0
! End of equation: 9800.*(-x)*time/1 (MPa)
!
! Begin of equation: 0.0 (MPa)
_loadvari42r(0,0,3)= 50, -999
_loadvari42r(2,0,3)= 0.0
_loadvari42r(3,0,3)= 0.0
_loadvari42r(4,0,3)= 0.0
_loadvari42r(5,0,3)= 0.0
_loadvari42r(6,0,3)= 0.0
_loadvari42r(0,1,3)= 1.0, -1, 0, 0, 0, 0, 0
_loadvari42r(0,2,3)= 0.0, -2, 0, 0.000001, 0, 0, -1
_loadvari42r(0,3,3)=   1, -3, 0, 1, -1, 3, -2
_loadvari42r(0,4,3)= 0.0, 99, 0, 1, -3, 0, 0
_loadvari42r(0,5,3)= 0.0,
_loadvari42r(0,6,3)= 0.0,
_loadvari42r(0,7,3)= 0.0,
_loadvari42r(0,8,3)= 0.0,
_loadvari42r(0,9,3)= 0.0,
_loadvari42r(0,10,3)= 0.0,
_loadvari42r(0,11,3)= 0.0,
_loadvari42r(0,12,3)= 0.0,
! End of equation: 0.0 (MPa)

fini
/com,****************************************************************************
/com,*************************    SOLUTION       ********************************
/com,****************************************************************************
/solu
antype,0                   ! static analysis
_thickRatio=  0     ! Ratio of thick parts in the model
eqsl,sparse,,,,,1
cntr,print,1               ! print out contact info and also make no initial contact an error
cncheck,dmp		!	Enable program controlled contact splitting for distributed memory parallel run
dmpoption,emat,no             ! Don't combine emat file for DANSYS
dmpoption,esav,no             ! Don't combine esav file for DANSYS
nldiag,cont,iter           ! print out contact info each equilibrium iteration
rescontrol,,none                 ! Do not keep any restart files
/com,****************************************************
/com,******************* SOLVE FOR LS 1 OF 1 ****************
esel,s,type,,2
nsle
sf,all,pres,%_loadvari37r%
esel,s,type,,3
nsle
sf,all,pres,%_loadvari42r%
nsel,all
esel,all
nsub,1,1,1
time,1.
outres,erase
outres,all,none
outres,nsol,all,
outres,rsol,all
outres,eangl,all
outres,etmp,all
outres,veng,all
outres,strs,all,
outres,epel,all,
outres,eppl,all,
outres,cont,all,
! *********** WB SOLVE COMMAND ***********
! check interactive state
*get,ANSINTER_,active,,int
*if,ANSINTER_,ne,0,then
/eof
*endif
solve
/com *************** Write FE CONNECTORS *********
CEWRITE,file,ce,,INTE
/com,****************************************************
/com,*************** FINISHED SOLVE FOR LS 1 *************
fini
*get,_NSOLTHREADS,active,0,ntfs
*get,_NSOLPROCESSES,active,0,npfs
/post1
fini
